// COMSOL Multiphysics 6.2.0.290 model "Param_estim_kc.mph"
// Outline of the model tree

Parameters
  Ri = 0.8225[mm]  // Inner radius of DDS
  Ro_pcl = Ri+(0.09[mm])  // Outer radius of PCL
  Dinner = 8.41e-7[cm^2/s]  // Hollow diffusion coefficient
  MW_BSA = 66000[g/mol]  // Molecular weight of BSA
  Meshmax = 0.1[mm]  // Maximum element size. Using same as Van Kampen's
  Meshmin = 2.4e-5[mm]  // Minimum element size. Using same as Van Kampen's
  Hc = 13[mm]  // Cylinder height. To be confirmed
  D_pcl = 8.41e-7[cm^2/s]  // PCL diffusion coefficient
  c_init = 1 [mol/m^3]  // Initial arb conc.
  burst = 0  // Burst release
  tc = 28[d]  // critical time
  porosity = 6.73e-3  // Initial porosity guess
  tau_final = 852.7  // final tortuosity
  kc = 1.93e-8[cm/s]  // mass transport resistance coefficient

Variables
  var1 "Variables 1"
    mass_drug1 = intop1(c_BSA*MW_BSA)+intop2(c_BSA*MW_BSA*(porosity))
    mass_init1 = withsol('sol22',intop1(c_BSA)*MW_BSA,setval(t,0))
    tau = porosity^(-1)*(t<tc)+tau_final*(t>=tc)
    mass_drug_hollow = intop1(c_BSA*MW_BSA)
    mass_drug_PCL = intop2(c_BSA*MW_BSA*porosity)

Couplings
  intop1: Integration on domains 1 | axisym = on
  intop2: Integration on domains 2 | axisym = on

Geometry
  geom1 "Geometry 1" (2D axisymmetric, length unit mm)
    r1: Rectangle "Inner cylinder (Hollow)" | size = {Ri, Hc}
    r3: Rectangle "Outer cylinder 2 (PCL)" | size = {Ro_pcl, Hc}
    ls1: LineSegment | vertex1 = r3(1) points 3; specify2 = coord; coord2 = {Ro_pcl-(0.22 [mm]), 13}
    ls2: LineSegment | vertex1 = r3(1) points 1; specify2 = coord; coord2 = {Ro_pcl-(0.22 [mm]), 0}
    fin: Finalize "Form Union"

Physics
  tds3: DilutedSpeciesInPorousMedia "Transport of Diluted Species in Porous Media 3" on all domains
    dependent variable c_BSA
    TransportMechanism.Convection = 0
    TransportMechanism.Migration = 0
    TransportMechanism.MassTransferInPorousMedia = 1
    porous1: PorousMedium (default)
      fluid1: FluidPorousMedium "Fluid 1" (default)
        u_src = userdef
        u = {0, 0, 0}
        tauF = porosity^(-1)*(t<tc)+tau_final*(t>=tc)
        FluidDiffusivityModelType = TortuosityModel
        DF_c_BSA = D_pcl
      pm1: PorousMatrixPorousMedium "Porous Matrix 1" (default) | poro_mat = userdef; poro = porosity
    axi1: AxialSymmetry (default)
    nflx1: NoFlux (default)
    init1: init "Initial Values 1" (default) | initc = c_init
    init2: init "Initial Values 2" on domains 2 | initc = 0
    cdm1: ConvectionDiffusionMigration "Transport Properties 1" on domains 1 | u_src = fromCommonDef; D_c_BSA = Dinner
    conc1: Concentration on boundaries 9 | species = 1
    fl1: FluxBoundary "Flux 1" on boundaries 2, 3 | FluxType = ExternalConvection; species = 1; kc = kc
  opt: GeneralOptimization on no domains
    glsobj1: GlobalLeastSquaresObjective
      fileName = C:UsersechacinrOneDrive - University at BuffaloDesktopModel for multi-start in MicrocapsulesBSA_PCL_Big_MCs_5.csv
      t1: TimeColumn
      v1: ValueColumn | columnExpression = (burst+(100-burst)*(1-mass_drug1/mass_init1))

Mesh
  mesh1 "Mesh 1"
    size: MeshSizeDefault | hmax = 0.871; hmin = 0.0039; hcurve = 0.3; hgrad = 1.3
    size1: Size on domains 1, 2 | hmax = Meshmax; hmin = Meshmin; hnarrow = 20; custom = on
    ftri1: FreeTri "Free Triangular 1" on remaining entities

Studies
  std1 "Study 1"
    opt: Optimization
      optsolver = coordsearch
      opttol = 0.001
      opttolinner = 0.01
      optobj = comp1.opt.glsobj1
      descr = Least-squares objective value
      optobjEvaluateFor = time
      objectivescaling = init
      initval = 1e-10[m/s]
      scale = 1e-10[m/s]
      lbound = 1e-12[m/s]
      ubound = 1e-8[m/s]
      pname = kc
    time: Transient "Time Dependent" | tlist = range(0,86400,36288000); solve for = {tds3}

Solver configurations
  sol22 "Solution 22" (study std1)
    v1: Variables "Dependent Variables 1"
    t1: Time "Time-Dependent Solver 1"
      tlist = range(0,86400,36288000)
      rtol = 0.005
      maxorder = 2
      stabcntrl = on
      tlistlsq = {1800, 3600, 10800, 21600, 64800, 86400, 172800, 259200, 432000, 604800, 864000, 1209600, 2419200, 4838400, 7257600, 9676800, 12096000, 14515200, 16934400, 19353600, 21772800, 24192000, 26611200, 29030400, 31449600, 33868800, 36288000}
      lsqtimesout = 1.80e+03 3.60e+03 1.08e+04 2.16e+04 6.48e+04 8.64e+04 1.73e+05 2.59e+05 4.32e+05 6.05e+05 8.64e+05 1.21e+06 2.42e+06 4.84e+06 7.26e+06 9.68e+06 1.21e+07 1.45e+07 1.69e+07 1.94e+07 2.18e+07 2.42e+07 2.66e+07 2.90e+07 3.14e+07 3.39e+07 3.63e+07
      fc1: FullyCoupled
        linsolver = d1
        maxiter = 8
        damp = 0.9
        jtech = once
        stabacc = aacc
        aaccdim = 5
        aaccmix = 0.9
        aaccdelay = 1
      d1: Direct "Direct, concentrations (tds3)" | linsolver = pardiso; pivotperturb = 1.0E-13
  sol23 "Parametric Solutions 1" (study std1)

Datasets
  dset12: Solution | solution = sol22
  dset13: Solution | solution = sol23

Tables
  tbl3: Table "Objective Table 3"
    burst | D_pcl (m^2/s) | Objective
    5 | 2.5e-15 | 4159.6
    5.3 | 2.5e-15 | 4103.4
    5.9 | 2.5e-15 | 3995.09
    7.1 | 2.5e-15 | 3794.92
    9.5 | 2.5e-15 | 3460.34
    14.3 | 2.5e-15 | 3054.2
    23.9 | 2.5e-15 | 3293.99
    4.7 | 2.5e-15 | 4217.18
    14.3 | 2.65e-14 | 5262.51
    18.14 | 2.5e-15 | 2981.78
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  tbl4: Table "Experimental data"
    Column 1 | Column 2
    1800 | 0.529142
    3600 | 0.765861
    10800 | 1.19621
    21600 | 2.13501
    64800 | 3.33198
    86400 | 3.95069
    172800 | 6.48068
    259200 | 8.48379
    432000 | 11.6302
    604800 | 14.8689
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  tbl6: Table "Objective Table 6"
    kc (m/s) | Objective
    1e-10 | 2560.24
  tbl7: Table
    // Surface Average 1
    Time (s) | Concentration (mol/m^3)
    0 | 0.427821
    43200 | 0.434385
    86400 | 0.310402
    129600 | 0.220985
    172800 | 0.157263
    216000 | 0.112027
    259200 | 0.0798308
    302400 | 0.0568636
    345600 | 0.0405091
    388800 | 0.0288637
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  tbl9: Table "Accumulated Probe Table 9"
    porosity | porosity2 | Time (s)
    0.01 | 0.0001 | 3600
    0.01 | 0.0001 | 7200
    0.01 | 0.0001 | 10800
    0.01 | 0.0001 | 14400
    0.01 | 0.0001 | 18000
    0.01 | 0.0001 | 21600
    0.01 | 0.0001 | 25200
    0.01 | 0.0001 | 28800
    0.01 | 0.0001 | 32400
    0.01 | 0.0001 | 36000
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
Plots
  pg5: PlotGroup1D "Cumulative drug release (%)"
    tblp1: Table "Table Graph 1" | table = tbl4

Exports
  plot1: Plot | filename = C:\Users\echacinr\OneDrive - University at Buffalo\Desktop\Small_Bev_10percent_option3.csv