// COMSOL Multiphysics 6.2.0.290 model "Param_estim_porosity_tortuosity.mph"
// Outline of the model tree

Parameters
  Ri = 0.13[mm]  // Inner radius of DDS
  Ro_pcl = Ri+(0.09[mm])  // Outer radius of PCL
  Dinner = 8.41e-7[cm^2/s]  // Hollow diffusion coefficient
  MW_BSA = 66000[g/mol]  // Molecular weight of BSA
  Meshmax = 0.1[mm]  // Maximum element size. Using same as Van Kampen's
  Meshmin = 2.4e-5[mm]  // Minimum element size. Using same as Van Kampen's
  Hc = 13[mm]  // Cylinder height. To be confirmed
  D_pcl = 8.41e-7[cm^2/s]  // PCL diffusion coefficient
  c_init = 1 [mol/m^3]  // Initial arb conc.
  burst = 0  // Burst release
  tc = 7[d]  // critical time
  porosity = 6.73e-3  // Initial porosity guess
  tau_final = 852.7  // final tortuosity

Variables
  var1 "Variables 1"
    mass_drug1 = intop1(c_BSA*MW_BSA)+intop2(c_BSA*MW_BSA*(porosity))
    mass_init1 = withsol('sol1',intop1(c_BSA)*MW_BSA,setval(t,0))
    tau = porosity^(-1)*(t<tc)+tau_final*(t>=tc)
    mass_drug_hollow = intop1(c_BSA*MW_BSA)
    mass_drug_PCL = intop2(c_BSA*MW_BSA*porosity)

Couplings
  intop1: Integration on domains 1 | axisym = on
  intop2: Integration on domains 2 | axisym = on

Geometry
  geom1 "Geometry 1" (2D axisymmetric, length unit mm)
    r1: Rectangle "Inner cylinder (Hollow)" | size = {Ri, Hc}
    r3: Rectangle "Outer cylinder 2 (PCL)" | size = {Ro_pcl, Hc}
    ls1: LineSegment | vertex1 = r3(1) points 4; specify2 = coord; coord2 = {0.13, 13}
    ls2: LineSegment | vertex1 = r3(1) points 1; specify2 = coord; coord2 = {0.13, 0}
    fin: Finalize "Form Union"

Physics
  tds3: DilutedSpeciesInPorousMedia "Transport of Diluted Species in Porous Media 3" on all domains
    dependent variable c_BSA
    TransportMechanism.Convection = 0
    TransportMechanism.Migration = 0
    TransportMechanism.MassTransferInPorousMedia = 1
    porous1: PorousMedium (default)
      fluid1: FluidPorousMedium "Fluid 1" (default)
        u_src = userdef
        u = {0, 0, 0}
        tauF = porosity^(-1)*(t<tc)+tau_final*(t>=tc)
        FluidDiffusivityModelType = TortuosityModel
        DF_c_BSA = D_pcl
      pm1: PorousMatrixPorousMedium "Porous Matrix 1" (default) | poro_mat = userdef; poro = porosity
    axi1: AxialSymmetry (default)
    nflx1: NoFlux (default)
    init1: init "Initial Values 1" (default) | initc = c_init
    init2: init "Initial Values 2" on domains 2 | initc = 0
    cdm1: ConvectionDiffusionMigration "Transport Properties 1" on domains 1 | u_src = fromCommonDef; D_c_BSA = Dinner
    conc1: Concentration on boundaries 7 | species = 1
  opt: GeneralOptimization on no domains
    glsobj1: GlobalLeastSquaresObjective
      fileName = C:UsersechacinrOneDrive - University at BuffaloDocumentsEduardoChacinDissertationMicroparticles2Parameter_estimationMulti_start_PCL_onlySmall_microcapsulesBSA_PCL_MCs_5.csv
      t1: TimeColumn
      v1: ValueColumn | columnExpression = (burst+(100-burst)*(1-mass_drug1/mass_init1))

Mesh
  mesh1 "Mesh 1"
    size: MeshSizeDefault | hmax = 0.871; hmin = 0.0039; hcurve = 0.3; hgrad = 1.3
    size1: Size on domains 1, 2 | hmax = Meshmax; hmin = Meshmin; hnarrow = 20; custom = on
    ftri1: FreeTri "Free Triangular 1" on remaining entities

Studies
  std1 "Study 1"
    opt: Optimization
      optsolver = coordsearch
      opttol = 0.001
      opttolinner = 0.01
      optobj = comp1.opt.glsobj1
      descr = Least-squares objective value
      optobjEvaluateFor = time
      objectivescaling = init
      initval = {6.5e-3, 850}
      scale = {1e-2, 1000}
      lbound = {1e-3, 100}
      ubound = {1e-1, 10000}
      pname = {porosity, tau_final}
    time: Transient "Time Dependent" | tlist = range(0,86400,21772800); solve for = {tds3}

Solver configurations
  sol1 "Solution 1" (study std1)
    v1: Variables "Dependent Variables 1"
    t1: Time "Time-Dependent Solver 1"
      tlist = range(0,86400,21772800)
      rtol = 0.005
      maxorder = 2
      stabcntrl = on
      tlistlsq = {3600, 10800, 21600, 43200, 86400, 259200, 604800, 1209600, 2419200, 4838400, 7257600, 9676800, 12096000, 14515200, 16934400, 19353600, 21772800}
      lsqtimesout = 3.60e+03 1.08e+04 2.16e+04 4.32e+04 8.64e+04 2.59e+05 6.05e+05 1.21e+06 2.42e+06 4.84e+06 7.26e+06 9.68e+06 1.21e+07 1.45e+07 1.69e+07 1.94e+07 2.18e+07
      fc1: FullyCoupled
        linsolver = d1
        maxiter = 8
        damp = 0.9
        jtech = once
        stabacc = aacc
        aaccdim = 5
        aaccmix = 0.9
        aaccdelay = 1
      d1: Direct "Direct, concentrations (tds3)" | linsolver = pardiso; pivotperturb = 1.0E-13
  sol2 "Parametric Solutions 1" (study std1)

Datasets
  dset1: Solution | solution = sol1
  rev1: Revolve2D "Revolution 2D 1" | data = dset1; startangle = -90; revangle = 225
  cln1: CutLine2D | data = dset1; genpoints = {{0, 15/2}, {1, 15/2}}; bounded = off
  cpt1: CutPoint2D | data = dset1; pointx = Ri-0.005[mm]; pointy = Hc/2
  dset2: Solution | solution = sol2
  rev2: Revolve2D "Revolution 2D 2" | data = dset2; startangle = -90; revangle = 225

Derived values
  gpev1: EvalPointMatrix "Point Matrix Evaluation 1" | data = cln1; table = new
  pev1: EvalPoint "Point Evaluation 1" | data = dset1; expr = c_BSA

Tables
  tbl4: Table "Experimental data"
    Column 1 | Column 2
    3600 | 0.1177
    10800 | 0.4788
    21600 | 0.6938
    43200 | 2.2073
    86400 | 5.3032
    259200 | 21.9837
    604800 | 33.5234
    1.2096e+06 | 48.3545
    2.4192e+06 | 60.1473
    4.8384e+06 | 69.7089
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  tbl6: Table "Objective Table 6"
    porosity | tau_final | Objective
    0.0065 | 850 | 212.419
    0.0095 | 850 | 2734.23
    0.0035 | 850 | 7727.16
    0.0065 | 1150 | 622.92
    0.0065 | 550 | 486.176
    0.0109525 | 837.806 | 5197.79
    0.00828099 | 845.122 | 1105.99
    0.0072124 | 848.049 | 263.338
    0.0077 | 850 | 496.409
    0.0053 | 850 | 1446.68
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
Plots
  pg5: PlotGroup1D "Cumulative drug release (%)"
    tblp1: Table "Table Graph 1" | table = tbl4
    glob1: Global | expr = (burst+(100-burst)*(1-mass_drug1/mass_init1))
  pg6: PlotGroup2D "Concentration (tds3)" | data = dset1
    surf1: Surface | expr = c_BSA
    str1: Streamline | expr = {tds3.tflux_c_BSAr, tds3.tflux_c_BSAz}; pointtype = arrow; arrowlength = logarithmic
  pg7: PlotGroup3D "Concentration, 3D (tds3)" | data = rev1; typeintitle = off
    surf1: Surface | expr = c_BSA
  pg8: PlotGroup2D "Concentration (tds3) 1" | data = dset2
    surf1: Surface | expr = c_BSA
    str1: Streamline | expr = {tds3.tflux_c_BSAr, tds3.tflux_c_BSAz}; pointtype = arrow; arrowlength = logarithmic
  pg9: PlotGroup3D "Concentration, 3D (tds3) 1" | data = rev2; typeintitle = off
    surf1: Surface | expr = c_BSA

Exports
  plot1: Plot | filename = C:\Users\echacinr\OneDrive - University at Buffalo\Desktop\Small_Bev_10percent_option3.csv